# Концентрационные константы молекулярных форм кроме базовых
K6 := 10^-1.530 = 0.0295121  # HNO[3]
k8 := 10^1.3 = 19.9526
K7 := 10^-9.5 = 3.16228e-10  # NH[4]*NO[3]
K8 := 10^1.3 = 19.9526
La(NO[3])^2
10^-2.6755 = 0.00211106
K9 := 10^-3.39 = 0.00040738  # NH[4]*NO[3]*TBP[2]
K10 := 10^-2.931 = 0.0011722  # H[3]*NO[3][3]*TBP
K11 := 10^0.1374 = 1.37214  # HNO[3]*TBP
K12 := 10^2.003 = 100.693  # H[2]*NO[3][2]*TBP
# Варьируемая константа
La(NO[3])[3]*TBP[3]
K13 := 10^-0.805 = 0.156675
K14 := 10^-0.008 = 0.981748
La(NO[3])[3]*TBP[4]
K15 := 10^-0.620 = 0.239883  # TBP
# Экспериментальная точка №1
# Исходные общие концентрации (равновесные в воде + равновесные в органике)
b1 := 0.2069 + 0.5229 = 0.7298  # La
b2 := 0.6207 + 1.5787 = 2.1994  # NO[3]
b3 := 0 + 0.01 = 0.01  # H
b4 := 3.66 + 0.001 = 3.661  # TBP
b5 := 0.0 + 0.000001 = 1e-6  # NH[4]
# Начальные приближения общих концентраций
x1 := b1 = 0.7298  # La
x2 := b2 = 2.1994  # NO[3]
x3 := b3 = 0.01  # H
x4 := b4 = 3.661  # TBP
x5 := b5 = 1e-6  # NH[4]
# Система нелинейных алгебраических уравнений
Given
x1 + K8*x1*x2 + K13*x1*x2^3*x4^3 + K14*x1*x2^3*x4^4 == b1
x2 + K6*x2*x3 + K7*x2*x5 + K8*x1*x2 + K9*x2*x4^2*x5 + 3*(K10*x2^3*x3^3*x4) + K11*x2*x3*x4 + 2*(K12*x2^2*x3^2*x4) + 3*K13*x1*x2^3*x4^3 + 3*K14*x1*x2^3*x4^4 == b2
x3 + K6*x2*x3 + K10*x2^3*x3^3*x4 + K11*x2*x3*x4 + 2*(K12*x2^2*x3^2*x4) == b3
x4 + K9*x2*x4^2*x5*2 + K10*x2^3*x3^3*x4 + K11*x2*x3*x4 + K12*x2^2*x3^2*x4 + 3*(K13*x1*x2^3*x4^3) + K14*x1*x2^3*x4^4*4 + 2*(K15*x4^2) == b4
x5 + K7*x2*x5 + K9*x2*x4^2*x5 == b5
# Решение системы
sol1 := Find(x1, x2, x3, x4, x5) = [0.0233653; 1.07158; 0.00234442; 1.60688; 9.98874e-7]
x1 := sol1[0] = 0.0233653
x4 := sol1[3] = 1.60688
x2 := sol1[1] = 1.07158
x5 := sol1[4] = 9.98874e-7
x3 := sol1[2] = 0.00234442
# Равновесные концентрации образующихся форм
x6 := K6*x2*x3 = 7.41408e-5  # HNO[3]
x7 := K7*x2*x5 = 3.3848e-16  # NH[4]*NO[3]
x8 := K8*x1*x2 = 0.499567
La(NO[3])^2
x9 := K9*x2*x4^2*x5 = 1.1259e-9  # NH[4]*NO[3]*TBP[2]
x10 := K10*x2^3*x3^3*x4 = 2.98644e-11  # H[3]*NO[3][3]*TBP
x11 := K11*x2*x3*x4 = 0.00553911  # HNO[3]*TBP
x12 := K12*x2^2*x3^2*x4 = 0.00102117  # H[2]*NO[3][2]*TBP
x13 := K13*x1*x2^3*x4^3 = 0.018689
La(NO[3])[3]*TBP[3]
x14 := K14*x1*x2^3*x4^4 = 0.188178
La(NO[3])[3]*TBP[4]
no3org := x9 + x10 + x11 + x12 + x13 + x14 = 0.213428
x15 := K15*x4^2 = 0.619391  # TBP
no3wat := x2 + x6 + x7 = 1.07165
# Общие концентрации лантана в воде и органике соответственно
no3com := x2 + x6 + x7 + x9 + x10 + x11 + x12 + x13 + x14 = 1.28508
lacom := x1 + x8 + x13 + x14 = 0.7298
laorg := x13 + x14 = 0.206867  # C[La]*org
NO1 := no3org*100/no3com = 16.6082
R1 := laorg*100/lacom = 28.3458
lawat := x1 + x8 = 0.522933  # C[La]*wat
NO2 := no3wat*100/no3com = 83.3918
R2 := lawat*100/lacom = 71.6542
# Экспериментальная точка №2
R1 + R2 = 100
NO1 + NO2 = 100
# Исходные общие концентрации (равновесные в воде + равновесные в органике)
b1 := 0.6893 + 0.32759 = 1.01689  # La
b2 := 2.0779 + 0.98277 = 3.06067  # NO[3]
b3 := 0.01 + 0 = 0.01  # H
b4 := 0.001 + 3.66 = 3.661  # TBP
b5 := 10^-6 + 0 = 1e-6  # NH[4]
# Начальные приближения равновесных концентраций
La
x1 := b1 = 1.01689
x2 := b2 = 3.06067  # NO[3]
x3 := b3 = 0.01  # H
x4 := b4 = 3.661  # TBP
x5 := b5 = 1e-6  # NH[4]
# Система нелинейных алгебраических уравнений
Given
x1 + K8*x1*x2 + K13*x1*x2^3*x4^3 + K14*x1*x2^3*x4^4 == b1
x2 + K6*x2*x3 + K7*x2*x5 + K8*x1*x2 + K9*x2*x4^2*x5 + 3*(K10*x2^3*x3^3*x4) + K11*x2*x3*x4 + 2*(K12*x2^2*x3^2*x4) + 3*K13*x1*x2^3*x4^3 + 3*K14*x1*x2^3*x4^4 == b2
x3 + K6*x2*x3 + K10*x2^3*x3^3*x4 + K11*x2*x3*x4 + 2*(K12*x2^2*x3^2*x4) == b3
x4 + K9*x2*x4^2*x5*2 + K10*x2^3*x3^3*x4 + K11*x2*x3*x4 + K12*x2^2*x3^2*x4 + 3*(K13*x1*x2^3*x4^3) + K14*x1*x2^3*x4^4*4 + 2*(K15*x4^2) == b4
x5 + K7*x2*x5 + K9*x2*x4^2*x5 == b5
# Решение системы
sol2 := Find(x1, x2, x3, x4, x5) = [0.0239406; 1.41598; -0.00860812; 1.4375; 9.98809e-7]
x1 := sol2[0] = 0.0239406
x3 := sol2[2] = -0.00860812
x2 := sol2[1] = 1.41598
x4 := sol2[3] = 1.4375
x5 := sol2[4] = 9.98809e-7
# Равновесные концентрации образующихся форм
x6 := K6*x2*x3 = -0.000359721  # HNO[3]
x7 := K7*x2*x5 = 4.47239e-16  # NH[4]*NO[3]
x8 := K8*x1*x2 = 0.676383
La(NO[3])^2
x9 := K9*x2*x4^2*x5 = 1.19058e-9  # NH[4]*NO[3]*TBP[2]
x10 := K10*x2^3*x3^3*x4 = -3.05145e-9  # H[3]*NO[3][3]*TBP
x11 := K11*x2*x3*x4 = -0.0240422  # HNO[3]*TBP
x12 := K12*x2^2*x3^2*x4 = 0.021505  # H[2]*NO[3][2]*TBP
x13 := K13*x1*x2^3*x4^3 = 0.0316326
La(NO[3])[3]*TBP[3]
x14 := K14*x1*x2^3*x4^4 = 0.284934
La(NO[3])[3]*TBP[4]
x15 := K15*x4^2 = 0.4957  # TBP
# Общие концентрации лантана в воде и органике соответственно
no3org := x9 + x10 + x11 + x12 + x13 + x14 = 0.314029
laorg := x13 + x14 = 0.316566  # C[La]*org
lacom := x1 + x8 + x13 + x14 = 1.01689
R1 := laorg*100/lacom = 31.1308
lawat := x1 + x8 = 0.700324  # C[La]*wat
no3wat := x2 + x6 + x7 = 1.41562
no3com := x2 + x6 + x7 + x9 + x10 + x11 + x12 + x13 + x14 = 1.72965
# Экспериментальная точка №3
R2 := lawat*100/lacom = 68.8692
R1 + R2 = 100
# Исходные общие концентрации (равновесные в воде + равновесные в органике)
b1 := 0.8862 + 0.45345 = 1.33965  # La
NO1 := no3org*100/no3com = 18.1557
b2 := 2.6686 + 1.36035 = 4.02895  # NO[3]
NO2 := no3wat*100/no3com = 81.8443
b3 := 0.01 + 0 = 0.01  # H
NO1 + NO2 = 100
b4 := 0.001 + 3.66 = 3.661  # TBP
b5 := 10^-6 + 0 = 1e-6  # NH[4]
# Начальные приближения равновесных концентраций
La
x1 := b1 = 1.33965  # NO[3]
x2 := b2 = 4.02895
x3 := b3 = 0.01  # H
x4 := b4 = 3.661  # TBP
x5 := b5 = 1e-6  # NH[4]
# Система нелинейных алгебраических уравнений
Given
x1 + K8*x1*x2 + K13*x1*x2^3*x4^3 + K14*x1*x2^3*x4^4 == b1
x2 + K6*x2*x3 + K7*x2*x5 + K8*x1*x2 + K9*x2*x4^2*x5 + 3*(K10*x2^3*x3^3*x4) + K11*x2*x3*x4 + 2*(K12*x2^2*x3^2*x4) + 3*K13*x1*x2^3*x4^3 + 3*K14*x1*x2^3*x4^4 == b2
x3 + K6*x2*x3 + K10*x2^3*x3^3*x4 + K11*x2*x3*x4 + 2*(K12*x2^2*x3^2*x4) == b3
x4 + K9*x2*x4^2*x5*2 + K10*x2^3*x3^3*x4 + K11*x2*x3*x4 + K12*x2^2*x3^2*x4 + 3*(K13*x1*x2^3*x4^3) + K14*x1*x2^3*x4^4*4 + 2*(K15*x4^2) == b4
x5 + K7*x2*x5 + K9*x2*x4^2*x5 == b5
# Решение системы
sol3 := Find(x1, x2, x3, x4, x5) = [0.0240627; 1.85868; 0.00173403; 1.25429; 9.9881e-7]
x1 := sol3[0] = 0.0240627
x2 := sol3[1] = 1.85868
x3 := sol3[2] = 0.00173403
x4 := sol3[3] = 1.25429
# Равновесные концентрации образующихся форм
x5 := sol3[4] = 9.9881e-7
x6 := K6*x2*x3 = 9.51173e-5  # HNO[3]
x7 := K7*x2*x5 = 5.87066e-16  # NH[4]*NO[3]
x8 := K8*x1*x2 = 0.892377
La(NO[3])^2
x9 := K9*x2*x4^2*x5 = 1.18982e-9  # NH[4]*NO[3]*TBP[2]
x10 := K10*x2^3*x3^3*x4 = 4.92237e-11  # H[3]*NO[3][3]*TBP
x11 := K11*x2*x3*x4 = 0.00554697  # HNO[3]*TBP
x12 := K12*x2^2*x3^2*x4 = 0.00131194  # H[2]*NO[3][2]*TBP
x13 := K13*x1*x2^3*x4^3 = 0.0477689
La(NO[3])[3]*TBP[3]
x14 := K14*x1*x2^3*x4^4 = 0.375441
La(NO[3])[3]*TBP[4]
x15 := K15*x4^2 = 0.377392  # TBP
# Общие концентрации лантана в воде и органике соответственно
laorg := x13 + x14 = 0.42321  # C[La]*org
lacom := x1 + x8 + x13 + x14 = 1.33965
R1 := laorg*100/lacom = 31.5911
lawat := x1 + x8 = 0.91644  # C[La]*wat
# Экспериментальная точка №4
R2 := lawat*100/lacom = 68.4089
R1 + R2 = 100
# Исходные общие концентрации (равновесные в воде + равновесные в органике)
b1 := 1.0866 + 0.55172 = 1.63832  # La
b2 := 3.2698 + 1.65516 = 4.92496  # NO[3]
b3 := 0.01 + 0 = 0.01  # H
b4 := 0.001 + 3.66 = 3.661  # TBP
b5 := 10^-6 + 0 = 1e-6  # NH[4]
# Начальные приближения концентраций
x1 := b1 = 1.63832  # La
x2 := b2 = 4.92496  # NO[3]
x3 := b3 = 0.01  # H
x4 := b4 = 3.661  # TBP
x5 := b5 = 1e-6  # NH[4]
# Система нелинейных алгебраических уравнений
Given
x1 + K8*x1*x2 + K13*x1*x2^3*x4^3 + K14*x1*x2^3*x4^4 == b1
x2 + K6*x2*x3 + K7*x2*x5 + K8*x1*x2 + K9*x2*x4^2*x5 + 3*(K10*x2^3*x3^3*x4) + K11*x2*x3*x4 + 2*(K12*x2^2*x3^2*x4) + 3*K13*x1*x2^3*x4^3 + 3*K14*x1*x2^3*x4^4 == b2
x3 + K6*x2*x3 + K10*x2^3*x3^3*x4 + K11*x2*x3*x4 + 2*(K12*x2^2*x3^2*x4) == b3
x4 + K9*x2*x4^2*x5*2 + K10*x2^3*x3^3*x4 + K11*x2*x3*x4 + K12*x2^2*x3^2*x4 + 3*(K13*x1*x2^3*x4^3) + K14*x1*x2^3*x4^4*4 + 2*(K15*x4^2) == b4
x5 + K7*x2*x5 + K9*x2*x4^2*x5 == b5
# Решение системы
sol4 := Find(x1, x2, x3, x4, x5) = [0.0242484; 2.29606; 0.00155984; 1.11163; 9.98845e-7]
x1 := sol4[0] = 0.0242484
x2 := sol4[1] = 2.29606
x3 := sol4[2] = 0.00155984
x4 := sol4[3] = 1.11163
x5 := sol4[4] = 9.98845e-7
# Равновесные концентрации образующихся форм
x6 := K6*x2*x3 = 0.000105697  # HNO[3]
x7 := K7*x2*x5 = 7.25239e-16  # NH[4]*NO[3]
x8 := K8*x1*x2 = 1.11088
La(NO[3])^2
x9 := K9*x2*x4^2*x5 = 1.15453e-9  # NH[4]*NO[3]*TBP[2]
x10 := K10*x2^3*x3^3*x4 = 5.98618e-11  # H[3]*NO[3][3]*TBP
x11 := K11*x2*x3*x4 = 0.00546291  # HNO[3]*TBP
x12 := K12*x2^2*x3^2*x4 = 0.00143578  # H[2]*NO[3][2]*TBP
x13 := K13*x1*x2^3*x4^3 = 0.0631707
La(NO[3])[3]*TBP[3]
x14 := K14*x1*x2^3*x4^4 = 0.440024
La(NO[3])[3]*TBP[4]
x15 := K15*x4^2 = 0.29643  # TBP
# Концентрации лантана в воде и органике соответственно
lacom := x1 + x8 + x13 + x14 = 1.63832
laorg := x13 + x14 = 0.503195  # C[La]*org
R1 := laorg*100/lacom = 30.7141
lawat := x1 + x8 = 1.13513  # C[La]*wat
# Экспериментальная точка №5
R2 := lawat*100/lacom = 69.2859
R1 + R2 = 100
# Исходные общие концентрации (равновесные в воде + равновесные в органике)
b1 := 1.3786 + 0.6569 = 2.0355  # La
b2 := 4.1458 + 1.9707 = 6.1165  # NO[3]
b3 := 0.01 + 0 = 0.01  # H
b4 := 0.001 + 3.66 = 3.661  # TBP
b5 := 10^-6 + 0 = 1e-6  # NH[4]
# Начальные приближения концентраций
x1 := b1 = 2.0355  # La
x2 := b2 = 6.1165  # NO[3]
x3 := b3 = 0.01  # H
x4 := b4 = 3.661
x5 := b5 = 1e-6  # TBP
NH[4]
# Система нелинейных алгебраических уравнений
Given
x1 + K8*x1*x2 + K13*x1*x2^3*x4^3 + K14*x1*x2^3*x4^4 == b1
x2 + K6*x2*x3 + K7*x2*x5 + K8*x1*x2 + K9*x2*x4^2*x5 + 3*(K10*x2^3*x3^3*x4) + K11*x2*x3*x4 + 2*(K12*x2^2*x3^2*x4) + 3*K13*x1*x2^3*x4^3 + 3*K14*x1*x2^3*x4^4 == b2
x3 + K6*x2*x3 + K10*x2^3*x3^3*x4 + K11*x2*x3*x4 + 2*(K12*x2^2*x3^2*x4) == b3
x4 + K9*x2*x4^2*x5*2 + K10*x2^3*x3^3*x4 + K11*x2*x3*x4 + K12*x2^2*x3^2*x4 + 3*(K13*x1*x2^3*x4^3) + K14*x1*x2^3*x4^4*4 + 2*(K15*x4^2) == b4
x5 + K7*x2*x5 + K9*x2*x4^2*x5 == b5
# Решение системы
sol5 := Find(x1, x2, x3, x4, x5) = [0.0244199; 2.92539; 0.00138684; 0.956289; 9.98911e-7]
x1 := sol5[0] = 0.0244199
x2 := sol5[1] = 2.92539
x3 := sol5[2] = 0.00138684
x4 := sol5[3] = 0.956289
x5 := sol5[4] = 9.98911e-7
# Равновесные концентрации образующихся форм
x6 := K6*x2*x3 = 0.000119732  # HNO[3]
x7 := K7*x2*x5 = 9.24083e-16  # NH[4]*NO[3]
x8 := K8*x1*x2 = 1.42537
La(NO[3])^2
x9 := K9*x2*x4^2*x5 = 1.08865e-9  # NH[4]*NO[3]*TBP[2]
x10 := K10*x2^3*x3^3*x4 = 7.48556e-11  # H[3]*NO[3][3]*TBP
x11 := K11*x2*x3*x4 = 0.00532354  # HNO[3]*TBP
x12 := K12*x2^2*x3^2*x4 = 0.00158494  # H[2]*NO[3][2]*TBP
x13 := K13*x1*x2^3*x4^3 = 0.0837653
La(NO[3])[3]*TBP[3]
x14 := K14*x1*x2^3*x4^4 = 0.501942
La(NO[3])[3]*TBP[4]
x15 := K15*x4^2 = 0.21937  # TBP
# Общие концентрации лантана в воде и органике соответственно
lacom := x1 + x8 + x13 + x14 = 2.0355
laorg := x13 + x14 = 0.585707  # C[La]*org
R1 := laorg*100/lacom = 28.7746
lawat := x1 + x8 = 1.44979  # C[La]*wat
R2 := lawat*100/lacom = 71.2254
R1 + R2 = 100
# Экспериментальная точка №6
# Исходные общие концентрации
b1 := 1.6876 + 0.74828 = 2.43588  # La
b2 := 5.0728 + 2.24484 = 7.31764  # NO[3]
b3 := 0.01 + 0 = 0.01  # H
b4 := 0.001 + 3.66 = 3.661  # TBP
b5 := 10^-6 + 0 = 1e-6  # NH[4]
# Начальные приближения концентраций
x1 := b1 = 2.43588  # La
x2 := b2 = 7.31764  # NO[3]
x3 := b3 = 0.01
x4 := b4 = 3.661  # H
x5 := b5 = 1e-6
TBP
NH[4]
# Система нелинейных алгебраических уравнений
Given
x1 + K8*x1*x2 + K13*x1*x2^3*x4^3 + K14*x1*x2^3*x4^4 == b1
x2 + K6*x2*x3 + K7*x2*x5 + K8*x1*x2 + K9*x2*x4^2*x5 + 3*(K10*x2^3*x3^3*x4) + K11*x2*x3*x4 + 2*(K12*x2^2*x3^2*x4) + 3*K13*x1*x2^3*x4^3 + 3*K14*x1*x2^3*x4^4 == b2
x3 + K6*x2*x3 + K10*x2^3*x3^3*x4 + K11*x2*x3*x4 + 2*(K12*x2^2*x3^2*x4) == b3
x4 + K9*x2*x4^2*x5*2 + K10*x2^3*x3^3*x4 + K11*x2*x3*x4 + K12*x2^2*x3^2*x4 + 3*(K13*x1*x2^3*x4^3) + K14*x1*x2^3*x4^4*4 + 2*(K15*x4^2) == b4
x5 + K7*x2*x5 + K9*x2*x4^2*x5 == b5
# Решение системы
sol6 := Find(x1, x2, x3, x4, x5) = [0.0245385; 3.60198; 0.00125595; 0.833629; 9.98981e-7]
x1 := sol6[0] = 0.0245385
x2 := sol6[1] = 3.60198
x3 := sol6[2] = 0.00125595
x4 := sol6[3] = 0.833629
x5 := sol6[4] = 9.98981e-7
# Равновесные концентрации образующихся форм
x6 := K6*x2*x3 = 0.00013351  # HNO[3]
x7 := K7*x2*x5 = 1.13788e-15  # NH[4]*NO[3]
x8 := K8*x1*x2 = 1.76355
La(NO[3])^2
x9 := K9*x2*x4^2*x5 = 1.0187e-9
NH[4]*NO[3]*TBP[2]
x10 := K10*x2^3*x3^3*x4 = 9.0472e-11
H[3]*NO[3][3]*TBP
x11 := K11*x2*x3*x4 = 0.00517472  # HNO[3]*TBP
x12 := K12*x2^2*x3^2*x4 = 0.00171791  # H[2]*NO[3][2]*TBP
x13 := K13*x1*x2^3*x4^3 = 0.104085
La(NO[3])[3]*TBP[3]
x14 := K14*x1*x2^3*x4^4 = 0.543704
La(NO[3])[3]*TBP[4]
x15 := K15*x4^2 = 0.166704  # TBP
# Общие концентрации лантана в воде и органике соответственно
laorg := x13 + x14 = 0.647789  # C[La]*org
lacom := x1 + x8 + x13 + x14 = 2.43588
R1 := laorg*100/lacom = 26.5936
lawat := x1 + x8 = 1.78809  # C[La]*wat
# Экспериментальная точка №7
R2 := lawat*100/lacom = 73.4064
R1 + R2 = 100
# Исходные общие концентрации (равновесные в воде + равновесные в органике)
b1 := 1.9796 + 0.80517 = 2.78477  # La
b2 := 5.9488 + 2.41551 = 8.36431  # NO[3]
b3 := 0.01 + 0 = 0.01  # H
b4 := 0.001 + 3.66 = 3.661  # TBP
b5 := 10^-6 + 0 = 1e-6  # NH[4]
# Начальные приближения концентраций
x1 := b1 = 2.78477  # La
x2 := b2 = 8.36431  # NO[3]
x3 := b3 = 0.01  # H
x4 := b4 = 3.661
x5 := b5 = 1e-6  # TBP
NH[4]
# Система нелинейных алгебраических уравнений
Given
x1 + K8*x1*x2 + K13*x1*x2^3*x4^3 + K14*x1*x2^3*x4^4 == b1
x2 + K6*x2*x3 + K7*x2*x5 + K8*x1*x2 + K9*x2*x4^2*x5 + 3*(K10*x2^3*x3^3*x4) + K11*x2*x3*x4 + 2*(K12*x2^2*x3^2*x4) + 3*K13*x1*x2^3*x4^3 + 3*K14*x1*x2^3*x4^4 == b2
x3 + K6*x2*x3 + K10*x2^3*x3^3*x4 + K11*x2*x3*x4 + 2*(K12*x2^2*x3^2*x4) == b3
x4 + K9*x2*x4^2*x5*2 + K10*x2^3*x3^3*x4 + K11*x2*x3*x4 + K12*x2^2*x3^2*x4 + 3*(K13*x1*x2^3*x4^3) + K14*x1*x2^3*x4^4*4 + 2*(K15*x4^2) == b4
x5 + K7*x2*x5 + K9*x2*x4^2*x5 == b5
# Решение системы
sol7 := Find(x1, x2, x3, x4, x5) = [0.0246136; 4.21626; 0.00116576; 0.748451; 9.99039e-7]
x1 := sol7[0] = 0.0246136
x2 := sol7[1] = 4.21626
x3 := sol7[2] = 0.00116576
x4 := sol7[3] = 0.748451
x5 := sol7[4] = 9.99039e-7
# Равновесные концентрации образующихся форм
x6 := K6*x2*x3 = 0.000145057  # HNO[3]
x7 := K7*x2*x5 = 1.33202e-15  # NH[4]*NO[3]
x8 := K8*x1*x2 = 2.07063
La(NO[3])^2
x9 := K9*x2*x4^2*x5 = 9.6125e-10  # NH[4]*NO[3]*TBP[2]
x10 := K10*x2^3*x3^3*x4 = 1.04178e-10  # H[3]*NO[3][3]*TBP
x11 := K11*x2*x3*x4 = 0.00504778  # HNO[3]*TBP
x12 := K12*x2^2*x3^2*x4 = 0.0018207  # H[2]*NO[3][2]*TBP
x13 := K13*x1*x2^3*x4^3 = 0.121185
La(NO[3])[3]*TBP[3]
x14 := K14*x1*x2^3*x4^4 = 0.568343
La(NO[3])[3]*TBP[4]
x15 := K15*x4^2 = 0.134377  # TBP
# Общие концентрации лантана в воде и органике соответственно
laorg := x13 + x14 = 0.689528  # C[La]*org
lacom := x1 + x8 + x13 + x14 = 2.78477
R1 := laorg*100/lacom = 24.7607
lawat := x1 + x8 = 2.09524  # C[La]*wat
# Экспериментальная точка №8
R2 := lawat*100/lacom = 75.2393
R1 + R2 = 100
# Исходные общие концентрации (равновесные в воде + равновесные в органике)
b1 := 2.1935 + 0.84483 = 3.03833  # La
b2 := 6.5905 + 2.53449 = 9.12499  # NO[3]
b3 := 0.01 + 0 = 0.01  # H
b4 := 0.001 + 3.66 = 3.661  # TBP
b5 := 10^-6 + 0 = 1e-6  # NH[4]
# Начальные приближения равновесных концентраций
x1 := b1 = 3.03833  # La
x2 := b2 = 9.12499  # NO[3]
x3 := b3 = 0.01
x4 := b4 = 3.661  # H
x5 := b5 = 1e-6
TBP
NH[4]
# Система нелинейных алгебраических уравнений
Given
x1 + K8*x1*x2 + K13*x1*x2^3*x4^3 + K14*x1*x2^3*x4^4 == b1
x2 + K6*x2*x3 + K7*x2*x5 + K8*x1*x2 + K9*x2*x4^2*x5 + 3*(K10*x2^3*x3^3*x4) + K11*x2*x3*x4 + 2*(K12*x2^2*x3^2*x4) + 3*K13*x1*x2^3*x4^3 + 3*K14*x1*x2^3*x4^4 == b2
x3 + K6*x2*x3 + K10*x2^3*x3^3*x4 + K11*x2*x3*x4 + 2*(K12*x2^2*x3^2*x4) == b3
x4 + K9*x2*x4^2*x5*2 + K10*x2^3*x3^3*x4 + K11*x2*x3*x4 + K12*x2^2*x3^2*x4 + 3*(K13*x1*x2^3*x4^3) + K14*x1*x2^3*x4^4*4 + 2*(K15*x4^2) == b4
x5 + K7*x2*x5 + K9*x2*x4^2*x5 == b5
# Решение системы
sol8 := Find(x1, x2, x3, x4, x5) = [0.0246568; 4.67334; 0.00111042; 0.696469; 9.99077e-7]
x1 := sol8[0] = 0.0246568
x2 := sol8[1] = 4.67334
x3 := sol8[2] = 0.00111042
x4 := sol8[3] = 0.696469
x5 := sol8[4] = 9.99077e-7
# Равновесные концентрации образующихся форм
x6 := K6*x2*x3 = 0.00015315  # HNO[3]
x7 := K7*x2*x5 = 1.47648e-15  # NH[4]*NO[3]
x8 := K8*x1*x2 = 2.29913
La(NO[3])^2
x9 := K9*x2*x4^2*x5 = 9.22637e-10  # NH[4]*NO[3]*TBP[2]
x10 := K10*x2^3*x3^3*x4 = 1.14091e-10  # H[3]*NO[3][3]*TBP
x11 := K11*x2*x3*x4 = 0.00495928  # HNO[3]*TBP
x12 := K12*x2^2*x3^2*x4 = 0.00188858  # H[2]*NO[3][2]*TBP
x13 := K13*x1*x2^3*x4^3 = 0.133206
La(NO[3])[3]*TBP[3]
x14 := K14*x1*x2^3*x4^4 = 0.581336
La(NO[3])[3]*TBP[4]
x15 := K15*x4^2 = 0.11636  # TBP
# Общие концентрации лантана в воде и органике соответственно
laorg := x13 + x14 = 0.714542  # C[La]*org
lacom := x1 + x8 + x13 + x14 = 3.03833
lawat := x1 + x8 = 2.32379  # C[La]*wat
R1 := laorg*100/lacom = 23.5176
R2 := lawat*100/lacom = 76.4824
R1 + R2 = 100
N := [1; 2; 3; 4; 5; 6; 7; 8]
R1La := [97.8103042879; 98.6550749928; 98.9842218644; 99.0682372855; 98.9767403497; 98.5727597008; 97.6343171527; 96.175406251]
R2La := [2.1896957121; 1.3449250072; 1.0157781356; 0.9317627145; 1.0232596503; 1.4272402992; 2.3656828473; 3.824593749]
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